// COMSOL Multiphysics 6.2.0.339 model "2D_Solenoid_2Coils.mph"
// E-Core Transformer
// This example demonstrates how to perform transient simulations of a single-phase E-core transformer. Including the effect of a nonlinear B-H curve in the soft-iron core, the example computes the spatial distribution of the magnetic and electric fields, the magnetic saturation effect, the transient response, and the flux leakage to the surroundings. Two different versions of the transformer are simulated: the first one with a turn ratio of unity and the second one with a turn ratio of 1000.
// Outline of the model tree

Parameters
  Rp = 100[ohm]  // Primary side resistance
  Ns = 300  // Number of turns in secondary winding
  nu = 1[kHz]  // Frequency of supply voltage
  p0 = 1[atm]

Geometry
  geom1 "Geometry 1" (2D, length unit mm)
    r1: Rectangle "coil+" | pos = {6, 0}; base = center; size = {2, 10}
    r2: Rectangle "coil-" | pos = {-6, 0}; base = center; size = {2, 10}
    r3: Rectangle "air" | base = center; size = {80, 80}
    fin: Finalize "Form Union"

Materials
  mat1: Common "Air" on selection geom1_r3_dom
    def "Basic"
      relpermeability = 1
      electricconductivity = 0[S/m]
      pressure = 101325[Pa]
  mat2: Common "Copper" on domains 2, 3
    def "Basic"
      relpermeability = 1
      electricconductivity = 6e7[S/m]

Physics
  mf: InductionCurrents "Magnetic Fields" on all domains
    dependent variable A = {Ax, Ay, Az}
    fsp1: FreeSpace (default) | f_typ = 1[kHz]
    mi1: MagneticInsulation (default)
    init1: init "Initial Values 1" (default)
    als1: AmperesLaw "Ampère's Law 1" on selection geom1_r3_dom
      MagnetizationModel = LangevinFunction
      Lfunction = 1.5e6[A/m]*((200*mf.normHeff)/((200*mf.normHeff)+1.5e6[A/m]))
      epsilonr_mat = userdef
      epsilonr = 1
      T = 293.15[K]
    coil1: Coil on selection geom1_r1_dom
      ConductorModel = Multi
      ICoil = 1[A]
      N = 300
      sigmaCoil = 6e7[S/m]
      coilWindDiameter = 1[mm]
      FillingFactor = 0.5
      RCoilDC = 50[ohm]
      epsilonr_mat = userdef
      epsilonr = 1
    coil2: Coil on selection geom1_r2_dom
      ConductorModel = Multi
      ICoil = -1[A]
      N = 300
      sigmaCoil = 6e7[S/m]
      coilWindDiameter = 1[mm]
      FillingFactor = 0.5
      RCoilDC = 50[ohm]
      epsilonr_mat = userdef
      epsilonr = 1

Mesh
  mesh1 "Mesh 1"
    size: MeshSizeDefault | hmax = 5.36; hmin = 0.024; hcurve = 0.3; hgrad = 1.3
    ftri1: FreeTri "Free Triangular 1" on remaining entities

Studies
  std1 "Study 1"
    step1: Frequency "Frequency Domain 1" | plist = 1[kHz]

Solver configurations
  sol1 "Solution 1" (study std1)
    v1: Variables "Dependent Variables 1"
    s1: Stationary "Stationary Solver 1" | linpmethod = sol
      dDef: Direct
      p1: Parametric | pname = freq; plistarr = 1[kHz]; punit = Hz; pcontinuationmode = no
      fc1: FullyCoupled | linsolver = dDef

Datasets
  dset1: Solution | solution = sol1

Derived values
  int1: IntVolume "Volume Integration 1" | data = none; table = tbl1; expr = mf.Qh
  int2: IntVolume "Volume Integration 2" | data = none; table = tbl2; expr = mf.Qloss

Tables
  tbl1: Table
    // Volume Integration 1
    Volumetric loss density, electromagnetic (W) | Volumetric loss density, electromagnetic (W)
    1.06615 | 1.85168
  tbl2: Table
    // Volume Integration 2
    freq (Hz) | Volumetric loss density cycle average (W)
    0 | 0
    50 | 1.75832
    100 | 0.0493098
    150 | 0.0124501
    200 | 0.0167499
    250 | 0.0046785
    300 | 0.0101753

Plots
  pg1: PlotGroup2D "Magnetic Flux Density (1 kHz)" | data = dset1
    surf1: Surface | expr = mf.normB; unit = T